# OpenSim document version 40000
ScaleTool LaiUhlrich2022_scaled:
  mass: 78.2 [kg]
  height: 0
  age: -1
  GenericModelMaker:
    model_file: /home/selim/opencap-mono/output/case_001_STS/subject2/Session0/Cam3/STS1/OpenSim/Model/STS1_5/LaiUhlrich2022_generic.osim
  ModelScaler:
    apply: true
    scaling_order: measurements
    marker_file: /home/selim/opencap-mono/output/case_001_STS/subject2/Session0/Cam3/STS1/OpenSim/Model/STS1_5/neutral.trc
    time_range: 0 1
    preserve_mass_distribution: true
    MeasurementSet:
      Measurement foot: apply=true
        MarkerPair: markers=(r_calc r_toe)
        MarkerPair: markers=(r_calc r_5meta)
        MarkerPair: markers=(l_calc l_toe)
        MarkerPair: markers=(l_calc l_5meta)
        BodyScale talus_r: axes=(X Y Z)
        BodyScale calcn_r: axes=(X Y Z)
        BodyScale toes_r: axes=(X Y Z)
        BodyScale talus_l: axes=(X Y Z)
        BodyScale calcn_l: axes=(X Y Z)
        BodyScale toes_l: axes=(X Y Z)
      Measurement tibia_r: apply=true
        MarkerPair: markers=(r_knee r_ankle)
        MarkerPair: markers=(r_mknee r_mankle)
        BodyScale tibia_r: axes=(X Y Z)
      Measurement femur_r: apply=true
        MarkerPair: markers=(RHip r_knee)
        BodyScale femur_r: axes=(X Y Z)
        BodyScale patella_r: axes=(X Y Z)
      Measurement tibia_l: apply=true
        MarkerPair: markers=(l_knee l_ankle)
        MarkerPair: markers=(l_mknee l_mankle)
        BodyScale tibia_l: axes=(X Y Z)
      Measurement femur_l: apply=true
        MarkerPair: markers=(LHip l_knee)
        BodyScale femur_l: axes=(X Y Z)
        BodyScale patella_l: axes=(X Y Z)
      Measurement pelvisXY: apply=true
        MarkerPair: markers=(r_ASIS r_PSIS)
        MarkerPair: markers=(l_ASIS l_PSIS)
        BodyScale pelvis: axes=(X Y)
      Measurement pelvisZ: apply=true
        MarkerPair: markers=(LHip RHip)
        BodyScale pelvis: axes=Z
      Measurement torsoXY: apply=true
        MarkerPair: markers=(RShoulder r_PSIS)
        MarkerPair: markers=(LShoulder l_PSIS)
        MarkerPair: markers=(C7 r_PSIS)
        MarkerPair: markers=(C7 l_PSIS)
        BodyScale torso: axes=(X Y)
        BodyScale scapulaPhantom_r: axes=(X Y)
        BodyScale scapulaPhantom_l: axes=(X Y)
      Measurement torsoZ: apply=true
        MarkerPair: markers=(RShoulder LShoulder)
        BodyScale torso: axes=Z
        BodyScale scapulaPhantom_r: axes=Z
        BodyScale scapulaPhantom_l: axes=Z
      Measurement humerus: apply=true
        MarkerPair: markers=(RShoulder RElbow)
        MarkerPair: markers=(LShoulder LElbow)
        BodyScale humerus_r: axes=(X Y Z)
        BodyScale humerus_l: axes=(X Y Z)
      Measurement radius: apply=true
        MarkerPair: markers=(r_wrist_ulna r_elbow)
        MarkerPair: markers=(r_wrist_radius r_melbow)
        MarkerPair: markers=(l_wrist_ulna l_elbow)
        MarkerPair: markers=(l_wrist_radius l_melbow)
        BodyScale ulna_r: axes=(X Y Z)
        BodyScale radius_r: axes=(X Y Z)
        BodyScale hand_r: axes=(X Y Z)
        BodyScale ulna_l: axes=(X Y Z)
        BodyScale radius_l: axes=(X Y Z)
        BodyScale hand_l: axes=(X Y Z)
  MarkerPlacer:
    apply: true
    marker_file: /home/selim/opencap-mono/output/case_001_STS/subject2/Session0/Cam3/STS1/OpenSim/Model/STS1_5/neutral.trc
    time_range: 0 1
    output_motion_file: /home/selim/opencap-mono/output/case_001_STS/subject2/Session0/Cam3/STS1/OpenSim/Model/STS1_5/LaiUhlrich2022_scaled.mot
    output_model_file: /home/selim/opencap-mono/output/case_001_STS/subject2/Session0/Cam3/STS1/OpenSim/Model/STS1_5/LaiUhlrich2022_scaled.osim
    max_marker_movement: -1
    IKTaskSet:
      IKMarkerTask C7: apply=true weight=20
      IKMarkerTask RShoulder: apply=true weight=5
      IKMarkerTask LShoulder: apply=true weight=5
      IKMarkerTask sternum: apply=true weight=5
      IKMarkerTask r_ASIS: apply=true weight=10
      IKMarkerTask l_ASIS: apply=true weight=10
      IKMarkerTask r_PSIS: apply=true weight=10
      IKMarkerTask l_PSIS: apply=true weight=10
      IKMarkerTask RHip: apply=true weight=20
      IKMarkerTask LHip: apply=true weight=20
      IKMarkerTask r_knee: apply=true weight=10
      IKMarkerTask r_mknee: apply=true weight=10
      IKMarkerTask r_ankle: apply=true weight=10
      IKMarkerTask r_mankle: apply=true weight=10
      IKMarkerTask r_toe: apply=true weight=10
      IKMarkerTask r_5meta: apply=true weight=10
      IKMarkerTask r_calc: apply=true weight=10
      IKMarkerTask l_knee: apply=true weight=10
      IKMarkerTask l_mknee: apply=true weight=10
      IKMarkerTask l_ankle: apply=true weight=10
      IKMarkerTask l_mankle: apply=true weight=10
      IKMarkerTask l_toe: apply=true weight=10
      IKMarkerTask l_calc: apply=true weight=10
      IKMarkerTask l_5meta: apply=true weight=10
      IKMarkerTask r_elbow: apply=true weight=1
      IKMarkerTask r_wrist_radius: apply=true weight=5
      IKMarkerTask r_wrist_ulna: apply=true weight=5
      IKMarkerTask l_elbow: apply=true weight=1
      IKMarkerTask l_wrist_radius: apply=true weight=5
      IKMarkerTask l_wrist_ulna: apply=true weight=5
      IKCoordinateTask [values shared by the 13 below unless stated]: weight=0.1 value_type=manual_value value=0
      IKCoordinateTask hip_flexion_r: apply=true
      IKCoordinateTask hip_rotation_r: apply=false
      IKCoordinateTask knee_angle_r: apply=true
      IKCoordinateTask knee_adduction_r: apply=false
      IKCoordinateTask ankle_angle_r: apply=true value=0.08726646
      IKCoordinateTask hip_flexion_l: apply=true
      IKCoordinateTask hip_rotation_l: apply=false
      IKCoordinateTask knee_angle_l: apply=true
      IKCoordinateTask knee_adduction_l: apply=false
      IKCoordinateTask ankle_angle_l: apply=true value=0.08726646
      IKCoordinateTask lumbar_extension: apply=true
      IKCoordinateTask lumbar_bending: apply=true
      IKCoordinateTask lumbar_rotation: apply=true
